// COMSOL Multiphysics 6.3.0.420 model "fick_darcy_1fce_small_demo.mph"
// Outline of the model tree

Parameters
  rho_0 = 535  // dry density
  rho_k = rho_0/(1+(k_av*fsp))  // conventional density
  k_av = 0.5  // swelling coeff
  alpha_M = (5E-6)[1/m]  // moisture transfer coefficient
  K_L = 1e-12  // absolute permeability
  K_R = 2e-15
  K_T = 1e-15
  rho_sub = 1530  // density of wood substance, Autengruber 2020
  fsp = 0.28  // fibre saturation point
  max_w_k = ((1/(rho_k/1000))-(1/(rho_sub/1000)))
  n_bl = n_dl*900  // parametr for mulitplying B
  n_br = n_bl/100
  n_bt = n_bl/100
  n_dl = 1e-12
  n_dt = n_dl/100
  n_dr_c = 3/2
  c_b_in = 0.1
  EMC_amb_c = 0.08
  t_ime = 587160  // time of experiment duratioén form EMC
  t_step = t_ime/(100)
  d_base = 2

Functions
  int1: Interpolation "D_L" (disabled)
    funcnametable = {int1, 1}
    funcname = DL
    table = 
      {0, 2*n_dl}
      {0.05, 2.3*n_dl}
      {0.1, 2.7*n_dl}
      {0.15, 2*n_dl}
      {0.2, 1.7*n_dl}
      {0.25, 1.3*n_dl}
      {0.3, 1*n_dl}
  int2: Interpolation "D_R" (disabled)
    funcnametable = {int1, 1}
    funcname = DR
    table = 
      {0, (0.25*n_dt)*n_dr_c}
      {0.05, (0.4*n_dt)*n_dr_c}
      {0.1, (0.5*n_dt)*n_dr_c}
      {0.15, (0.75*n_dt)*n_dr_c}
      {0.2, (1*n_dt)*n_dr_c}
      {0.25, (1.9*n_dt)*n_dr_c}
      {0.3, (2.7*n_dt)*n_dr_c}
  int3: Interpolation "D_T" (disabled)
    funcnametable = {int1, 1}
    funcname = DT
    table = 
      {0, 0.25*n_dt}
      {0.05, 0.4*n_dt}
      {0.1, 0.5*n_dt}
      {0.15, 0.75*n_dt}
      {0.2, 1*n_dt}
      {0.25, 1.9*n_dt}
      {0.3, 2.7*n_dt}
  int4: Interpolation "DB_L"
    funcnametable = {int1, 1}
    funcname = DBL
    table = 
      {0, d_base*n_dl}
      {0.05, (d_base+(d_base*0.15))*n_dl}
      {0.1, (d_base+(d_base*0.35))*n_dl}
      {0.15, d_base*n_dl}
      {0.2, (d_base-(d_base*0.15))*n_dl}
      {0.25, (d_base-(d_base*0.35))*n_dl}
      {fsp, (d_base-(d_base/2))*n_dl}
      {0.5, 1*n_bl}
      {0.65, 1*n_bl}
      {1.5, 0.8*n_bl}
      {3, 0.65*n_bl}
  int5: Interpolation "DB_Rold" (disabled)
    funcnametable = {int1, 1}
    funcname = DBR
    table = 
      {0, (0.25*n_dt)*n_dr_c}
      {0.05, (0.4*n_dt)*n_dr_c}
      {0.1, (0.5*n_dt)*n_dr_c}
      {0.15, (0.75*n_dt)*n_dr_c}
      {0.2, (1*n_dt)*n_dr_c}
      {0.25, (1.9*n_dt)*n_dr_c}
      {fsp, (2.7*n_dt)*n_dr_c}
      {1, 1*n_br}
      {2, 1*n_br}
      {3, 1*n_br}
    interp = piecewisecubic
  int6: Interpolation "DB_Told" (disabled)
    funcnametable = {int1, 1}
    funcname = DBT
    table = 
      {0, 0.25*n_dt}
      {0.05, 0.4*n_dt}
      {0.1, 0.5*n_dt}
      {0.15, 0.75*n_dt}
      {0.2, 1*n_dt}
      {0.25, 1.9*n_dt}
      {fsp, 2.7*n_dt}
      {2, 1*n_bt}
      {3, 1*n_bt}
    interp = piecewisecubic
  int9: Interpolation "DB_T"
    funcnametable = {int1, 1}
    funcname = DBT
    table = 
      {0, d_base*n_dt}
      {0.05, (d_base+(d_base*0.15))*n_dt}
      {0.1, (d_base+(d_base*0.35))*n_dt}
      {0.15, d_base*n_dt}
      {0.2, (d_base-(d_base*0.15))*n_dt}
      {0.25, (d_base-(d_base*0.35))*n_dt}
      {fsp, (d_base-(d_base/2))*n_dt}
      {0.5, 1*n_bt}
      {0.65, 1*n_bt}
      {1.5, 0.8*n_bt}
      {3, 0.65*n_bt}
  int10: Interpolation "DB_R"
    funcnametable = {int1, 1}
    funcname = DBR
    table = 
      {0, (d_base*n_dt)*n_dr_c}
      {0.05, ((d_base+(d_base*0.15))*n_dt)*n_dr_c}
      {0.1, ((d_base+(d_base*0.35))*n_dt)*n_dr_c}
      {0.15, (d_base*n_dt)*n_dr_c}
      {0.2, ((d_base-(d_base*0.15))*n_dt)*n_dr_c}
      {0.25, ((d_base-(d_base*0.35))*n_dt)*n_dr_c}
      {fsp, ((d_base-(d_base/2))*n_dt)*n_dr_c}
      {0.5, (1*n_br)*n_dr_c}
      {0.65, (1*n_br)*n_dr_c}
      {1.5, (0.8*n_br)*n_dr_c}
      {3, (0.65*n_br)*n_dr_c}
  int11: Interpolation "EMC_amb"
    funcnametable = {int11, 1}
    funcname = EMC_amb
    table = 
      {0.0, 0.0860396442237}
      {2950.552763819096, 0.0860396442237}
      {5901.105527638192, 0.0860396442237}
      {8851.658291457288, 0.0864081873437}
      {11802.211055276384, 0.0871178537763}
      {14752.76381909548, 0.0883170679953}
      {17703.316582914576, 0.089838192726}
      {20653.86934673367, 0.0914249681427}
      {23604.42211055277, 0.0926897387095}
      {26554.974874371866, 0.0934628184387}
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    argunit = s

Couplings
  aveop1: Average on domains 1

Geometry
  geom1 "Geometry 1" (3D, length unit m)
    blk1: Block | size = {0.02, 0.02, 0.3}
    fin: Finalize "Form Union"

Physics
  c: CoefficientFormPDE on all domains
    dependent variable c_b
    EquationForm.form = Automatic
    cfeq1: CoefficientFormPDE (default) | c = diag{DBT(c_b), DBR(c_b), DBL(c_b)}; f = 0; da = 1
    zflx1: ZeroFluxBoundary "Zero Flux 1" (default)
    init1: init "Initial Values 1" (default) | c_b = c_b_in
    flux1: FluxBoundary "Flux/Source 1" (disabled) on no boundaries | g = alpha_M*EMC_amb(t); q = alpha_M
    dir1: DirichletBoundary "Dirichlet Boundary Condition 1" on boundaries 3 | r = max_w_k; useDirichletCondition = 1

Mesh
  mesh1 "Mesh 1"
    size: MeshSizeDefault | hauto = 1
    map1: Map "Mapped 1" on boundaries 3
    swe1: Sweep "Swept 1" on remaining entities | sourceface = boundaries 3; targetface = boundaries 4
      size1: Size on entire geometry | hauto = 1
      dis1: Distribution on domains 1 | type = predefined; elemcount = 60; elemratio = 10; growthrate = exponential

Studies
  std1 "Study 1"
    time: Transient "Time Dependent" | tlist = range(0,t_step,t_ime); initstudy = zero

Solver configurations
  sol1 "Solution 1" (study std1)
    v1: Variables "Dependent Variables 1"
    t1: Time "Time-Dependent Solver 1" | tlist = range(0,t_step,t_ime)
      dDef: Direct
      se1: Segregated
        ssDef: SegregatedStep
        ll1: LowerLimit | lowerlimit = comp1.c_b 0.0

Datasets
  dset1: Solution | solution = sol1

Derived values
  max1: MaxVolume "Volume Maximum 1" on domains 1 | data = dset1; table = tbl1; expr = c_b
  av1: AvVolume "Volume Average 1" on domains 1 | data = dset1; table = tbl2; expr = {c_b, c_b-at('first',c_b)}
  min1: MinVolume "Volume Minimum 1" on domains 1 | data = dset1; table = tbl3; expr = c_b
  int1: IntVolume "Volume Integration 1" on domains 1 | data = dset1; table = new; expr = c_b
  pev1: EvalPoint "Point Evaluation 1" on points 1, 2 | data = dset1; table = tbl5; expr = c_b; unit = 1

Tables
  tbl2: Table "average"
    // Volume Average 1
    Time (s) | c_b (1) | c_b-at('first',c_b) (1) | c_b (1) | c_b-at('first',c_b) (1)
    0 | 0.100979 | 0 | 0.10098 | 0
    5871.6 | 0.110687 | 0.00970792 | 0.110757 | 0.00977742
    11743.2 | 0.115125 | 0.014146 | 0.11519 | 0.0142108
    17614.8 | 0.118537 | 0.0175572 | 0.118589 | 0.0176091
    23486.4 | 0.12142 | 0.0204402 | 0.121457 | 0.0204778
    29358 | 0.123958 | 0.0229789 | 0.12399 | 0.0230106
    35229.6 | 0.126242 | 0.0252629 | 0.126273 | 0.0252937
    41101.2 | 0.12834 | 0.0273611 | 0.128377 | 0.0273977
    46972.8 | 0.130291 | 0.0293117 | 0.130332 | 0.0293528
    52844.4 | 0.13213 | 0.0311506 | 0.132175 | 0.0311951
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  mm1: Table "Maximum and Minimum Values"
    // Max/min volume
    X | Y | Z | Dependent variable c_b (1)
    0.02 | 0.0075 | 0.0449073 | 0.0757484
    0.005 | 0 | 0 | 1.47725
  tbl4: Table "exp_open"
    Time (s) | median | std
    0 | 0 | 0
    2950.55 | 0.00818532 | 0.00318218
    5901.11 | 0.0128768 | 0.00437831
    8851.66 | 0.0167356 | 0.00512249
    11802.2 | 0.0204352 | 0.00545691
    14752.8 | 0.023765 | 0.00582977
    17703.3 | 0.0259336 | 0.0062417
    20653.9 | 0.0281022 | 0.00666326
    23604.4 | 0.0302708 | 0.00709276
    26555 | 0.0321989 | 0.00744301
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  tbl5: Table "points"
    // Point Evaluation 1
    Time (s) | c_b (1), Point: 1 | c_b (1), Point: 2 | c_b (1), Point: 5 | c_b (1), Point: 6 | c_b (1), Point: 7 | c_b (1), Point: 8 | c_b (1), Point: 9 | c_b (1), Point: 10 | c_b (1), Point: 11 | c_b (1), Point: 12 | c_b (1), Point: 13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
    0 | 1.41537 | 0.0987571 | 0.0412736 | 0.0998583 | 0.0998583 | 0.0415175 | 0.0999257 | 0.0999257 | 0.0412736 | 0.0998583 | 0.0998583
    1584.3 | 1.41537 | 0.0832834 | 1.2042 | 0.426442 | 0.129379 | 1.26365 | 0.560771 | 0.210146 | 1.2042 | 0.426442 | 0.129379
    3168.6 | 1.41537 | 0.0880461 | 1.20599 | 0.442356 | 0.166217 | 1.26827 | 0.593606 | 0.357473 | 1.20599 | 0.442356 | 0.166217
    4752.9 | 1.41537 | 0.090103 | 1.20639 | 0.445934 | 0.179356 | 1.26935 | 0.601671 | 0.381964 | 1.20639 | 0.445934 | 0.179356
    6337.2 | 1.41537 | 0.0907924 | 1.20651 | 0.446988 | 0.183653 | 1.26967 | 0.603994 | 0.388035 | 1.20651 | 0.446988 | 0.183653
    7921.5 | 1.41537 | 0.0909459 | 1.20654 | 0.447215 | 0.184619 | 1.26974 | 0.604489 | 0.389241 | 1.20654 | 0.447215 | 0.184619
    9505.8 | 1.41537 | 0.0910029 | 1.20655 | 0.4473 | 0.18498 | 1.26977 | 0.604675 | 0.389683 | 1.20655 | 0.4473 | 0.18498
    11090.1 | 1.41537 | 0.0910201 | 1.20655 | 0.447326 | 0.18509 | 1.26977 | 0.604731 | 0.389816 | 1.20655 | 0.447326 | 0.18509
    12674.4 | 1.41537 | 0.0910293 | 1.20655 | 0.44734 | 0.185149 | 1.26978 | 0.604762 | 0.389887 | 1.20655 | 0.44734 | 0.185149
    14258.7 | 1.41537 | 0.0910316 | 1.20656 | 0.447344 | 0.185163 | 1.26978 | 0.60477 | 0.389905 | 1.20656 | 0.447344 | 0.185163
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  tbl6: Table "exp_closed"
    Time (s) | median | std
    0 | 0 | 0
    2950.55 | 0.00875364 | 0.00428185
    5901.11 | 0.0113733 | 0.00518821
    8851.66 | 0.0132937 | 0.00544113
    11802.2 | 0.0148226 | 0.00595981
    14752.8 | 0.0163644 | 0.00614318
    17703.3 | 0.0179467 | 0.00536077
    20653.9 | 0.0195289 | 0.0047947
    23604.4 | 0.0203352 | 0.00452689
    26555 | 0.0213263 | 0.004745
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
Plots
  pg1: PlotGroup3D "Coefficient Form PDE" | data = dset1
    slc1: Slice | expr = c_b; title = Moisture content in last time step (-); quickxnumber = 3; shift = -5.0E-4
    mmv1: MaxMinVolume | expr = c_b; table = mm1
  pg2: PlotGroup1D "1D Plot Group 2" | data = none
    tblp1: Table "minimum" (disabled)
      table = tbl3
      xaxisdata = auto
      plotcolumninput = manual
      autoplotlabel = on
      autoheaders = off
    tblp2: Table "average"
      table = tbl2
      xaxisdata = auto
      plotcolumninput = manual
      plotcolumns = 5
      autoplotlabel = on
      autoheaders = off
    tblp4: Table "experiment open"
      table = tbl4
      xaxisdata = auto
      plotcolumninput = manual
      plotcolumns = 2
      autoplotlabel = on
      autoheaders = off
    tblp5: Table "experiment closed"
      table = tbl6
      xaxisdata = auto
      plotcolumninput = manual
      plotcolumns = 2
      autoplotlabel = on
      autoheaders = off
    tblp3: Table "maximum" (disabled)
      table = tbl1
      xaxisdata = auto
      plotcolumninput = manual
      autoplotlabel = on
      autoheaders = off
  pg5: PlotGroup1D "1D Plot Group 5" | data = none
  pg6: PlotGroup1D "1D Plot Group 6" | data = none
    tblp1: Table "points" | table = tbl5; xaxisdata = auto; plotcolumninput = manual
  pg7: PlotGroup3D "3D Plot Group 7" | data = dset1
    vol1: Volume "Moisture in time" | expr = c_b; title = Moisture in time (-)
  pg8: PlotGroup1D "1D Plot Group 8" | data = none

Exports
  anim1: Animation | target = player; maxframes = 100
  anim2: Animation
    giffilename = /Users/bara/Documents/01_i3sense/validace/male_vzorky_ohyb/spruce_closed_slices.gif
    maxframes = 100
    width = 800